*Heading
** Job name: 4 Model name: Model-axon-3
** Generated by: Abaqus/CAE 6.12-1
*Preprint, echo=NO, model=NO, history=NO, contact=NO
** ----------------------------------------------------------------
**
** PART INSTANCE: Part-1-1
**
*Node
      1,           0., -0.0500000007,           0.
      2,           0., -0.0500000007, 0.0125000002
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*Element, type=C3D8
   1,  676, 1001, 3445, 2149,    1,    2,   13,   20
   2, 2149, 3445, 3446, 2150,   20,   13,   14,   19
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*Nset, nset=Part-1-1_Subcortex
     1,     2,     5,     8,     9,    10
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*Elset, elset=Part-1-1_Subcortex, generate
  1626,  16250,      1
*Nset, nset=Part-1-1_Cortex
    1,    2,    3,    4,    5,    6
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*Elset, elset=Part-1-1_Cortex, generate
    1,  1625,     1
** Section: Cortex
*Solid Section, elset=Part-1-1_Cortex, material=Cortex
,
** Section: Subcortex
*Solid Section, elset=Part-1-1_Subcortex, material=Subcortex
,
*System
*Nset, nset=front
     2,     3,     5,     6,    10,    12
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*Elset, elset=front, generate
     1,  16250,      1
*Nset, nset=back
     1,     4,     7,     8,     9,    11
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*Elset, elset=back, generate
     1,  16250,      1
*Nset, nset=bottom
    9,   10,   11,   12, 1501, 1502
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*Elset, elset=bottom, generate
  1670,  16250,     45
*Nset, nset=sides
    1,    2,    3,    4,    5,    6
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*Elset, elset=sides
     1,     2,     3,     4,     5,  1621
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**
** MATERIALS
**
*Material, name=Cortex
*Depvar
     10,
*User Material, constants=6
 9.31034, 1.03448,   0.475,      1.,      0.,      0.
*Material, name=Subcortex
*Depvar
     10,
*User Material, constants=8
 3.10345, 0.344828,     4.75,       1.,       1.,       3.,       0.,       0.
** ----------------------------------------------------------------
**
** STEP: Step-1
**
*Step, name=Step-1, nlgeom=YES, inc=100000
*Static
0.03, 3., 0.003, 0.06
**
** BOUNDARY CONDITIONS
**
** Name: back Type: Displacement/Rotation
*Boundary
back, 3, 3
** Name: bottom Type: Symmetry/Antisymmetry/Encastre
*Boundary
bottom, PINNED
** Name: front Type: Displacement/Rotation
*Boundary
front, 3, 3
** Name: sides Type: Displacement/Rotation
*Boundary
sides, 1, 1
**
** OUTPUT REQUESTS
**
*Restart, write, frequency=0
**
** FIELD OUTPUT: F-Output-3
**
*Output, field
*Node Output
COORD,
*Element Output, directions=YES
EVOL, SDV
**
** FIELD OUTPUT: F-Output-1
**
*Output, field, variable=PRESELECT
**
** HISTORY OUTPUT: H-Output-1
**
*Output, history, variable=PRESELECT
*End Step
